units		metal
boundary	p p p
atom_style	charge


#  Simulation control  #########################################################
box tilt	small
read_data	'xo.lmp'

variable	Nele equal 4
variable	Elements string 'Li Mn Co O'

variable	Electrostatic string 'T'
variable	Nevery_qeq equal 1
variable	maxiter_qeq equal 50
variable	maxrepeat_qeq equal 10

variable	Nprnt equal	10

variable	ptarget equal 0.0
variable	vmax equal 0.001
variable	etol equal 1.e-10
variable	ftol equal 1.e-8
variable	maxiter equal 10000
variable	maxeval equal 1000000

variable	dataout string 'dataout.cool'
################################################################################


#  Potential
if "${Electrostatic} == T" then &
	"pair_style	hybrid/overlay coul/streitz 12.0 wolf 0.20 meam" &
	"pair_coeff	* * meam			'library.meam' ${Elements} 'library.meam_alloy' ${Elements}" &
	"pair_coeff	* * coul/streitz	'library.streitz' ${Elements}" &
else &
	"pair_style	meam" &
	"pair_coeff	* * 'library.meam' ${Elements} 'library.meam_alloy' ${Elements}"


#  Neighbor
neighbor		0.3 bin
neigh_modify	delay 0


#  Average Charge
variable	n loop ${Nele} pad
label	Qavg
   group	type$n type $n
   compute	q$n type$n property/atom q
   compute	Qavg$n type$n reduce ave c_q$n
   next	n
jump	SELF Qavg


#  Thermo
print			'>THERMO:#  Step  Temp.   E_MEAM     E_ES     Potential  Int.Energy Enthalpy    Pressure                   BoxSize'
print			'THERMO:#  ----  ----  ---------  --------  -----------  --------  --------  ----------  -------  -------------------------'
thermo			${Nprnt}
variable		ene_meam equal pe-ecoul
thermo_style	custom step temp v_ene_meam ecoul pe etotal enthalpy press elong lx ly lz c_Qavg1 c_Qavg2 c_Qavg3 c_Qavg4
thermo_modify	norm yes
thermo_modify	format  1 ">THERMO:%7d"		#  step
thermo_modify	format  2 "%6.0f"			#  temperature
thermo_modify	format  3 "%9.5f"			#  meam energy
thermo_modify	format  4 "%9.5f"			#  electrostatic energy
thermo_modify	format  5 "%12.8f"			#  potential energy
thermo_modify	format  6 "%9.5f"			#  internal energy
thermo_modify	format  7 "%9.5f"			#  enthalpy
thermo_modify	format  8 "%11.3f"			#  pressure
thermo_modify	format  9 "%8.1e"			#  dummy
thermo_modify	format 10 "%8.4f"			#  boxsize1
thermo_modify	format 11 "%8.4f"			#  boxsize2
thermo_modify	format 12 "%8.4f"			#  boxsize3
thermo_modify	format 13 "%+8.5f"			#  charge1
thermo_modify	format 14 "%+8.5f"			#  charge2
thermo_modify   format 15 "%+8.5f"                      #  charge3
thermo_modify   format 16 "%+8.5f"                      #  charge4


#  Find equilibrium structure
if "${Electrostatic} == T" then "fix qeq 	all qeq/slater ${Nevery_qeq} 12.0 1.e-6 ${maxiter_qeq} ${maxrepeat_qeq} coul/streitz"

min_style   cg
minimize    ${etol} ${ftol} ${maxiter} ${maxeval}

fix relax	all box/relax aniso ${ptarget} vmax ${vmax}
minimize	${etol} ${ftol} ${maxiter} ${maxeval}

#  Write data
write_data	${dataout}
write_dump	all cfg  ${dataout}.cfg mass type xs ys zs q modify element ${Elements} sort id
